*Heading
** Job name: Job-1 Model name: sample
** Generated by: Abaqus/CAE 2022
*Preprint, echo=NO, model=NO, history=NO, contact=NO
**
** PARTS
**
*Part, name=Part-1
*Node
1, 0.000000, 0.000000, 0.00000000
2, 0.100000, 0.000000, 0.00000000
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*Element, type=S4R
   1,    1,    2,   83,   82
   2,    2,    3,   84,   83
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*Nset, nset=Set-1, generate
    1,  6561,     1
*Elset, elset=Set-1, generate
    1,  6400,     1
** Section: Section-1-SET-1
*Shell Section, elset=SET-1, composite
0.0075, 3, Composite, 65.0
0.0075, 3, Composite, -65.0
0.0075, 3, Composite, 19.0
0.0075, 3, Composite, -19.0
0.0075, 3, Composite, 65.0
0.0075, 3, Composite, -65.0
0.0075, 3, Composite, 19.0
0.0075, 3, Composite, -19.0
0.0075, 3, Composite, 65.0
0.0075, 3, Composite, -65.0
0.0075, 3, Composite, 19.0
0.0075, 3, Composite, -19.0
0.0075, 3, Composite, 65.0
0.0075, 3, Composite, -65.0
0.0075, 3, Composite, 19.0
0.0075, 3, Composite, -19.0
*End Part
**
**
** ASSEMBLY
**
*Assembly, name=Assembly
**
*Instance, name=Part-1-1, part=Part-1
*End Instance
**
*Nset, nset=Set-1, instance=Part-1-1, generate
    1,  6481,    81
*Elset, elset=Set-1, instance=Part-1-1, generate
    1,  6321,    80
*Nset, nset=Set-2, instance=Part-1-1, generate
   81,  6561,    81
*Elset, elset=Set-2, instance=Part-1-1, generate
   80,  6400,    80
*Nset, nset=Set-3, instance=Part-1-1, generate
  1,  81,   1
*Elset, elset=Set-3, instance=Part-1-1, generate
  1,  80,   1
*Nset, nset=Set-4, instance=Part-1-1, generate
 6481,  6561,     1
*Elset, elset=Set-4, instance=Part-1-1, generate
 6321,  6400,     1
*Nset, nset=Set-5, instance=Part-1-1, generate
   81,  6561,    81
*Elset, elset=Set-5, instance=Part-1-1, generate
   80,  6400,    80
*End Assembly
**
** MATERIALS
**
*Material, name=COMPOSITE
*Density
 0.000144,
*Elastic, type=ENGINEERING CONSTANTS
 2.15e+07, 1.23e+06, 1.23e+06,    0.329,    0.329,    0.329,  571000.,  571000.
  571000.,
**
** BOUNDARY CONDITIONS
**
** Name: BC-1 Type: Displacement/Rotation
*Boundary
Set-1, 1, 1
Set-1, 2, 2
Set-1, 3, 3
Set-1, 4, 4
Set-1, 5, 5
Set-1, 6, 6
** Name: BC-2 Type: Displacement/Rotation
*Boundary
Set-2, 2, 2
Set-2, 3, 3
Set-2, 4, 4
Set-2, 5, 5
Set-2, 6, 6
** Name: BC-3 Type: Displacement/Rotation
*Boundary
Set-3, 3, 3
** Name: BC-4 Type: Displacement/Rotation
*Boundary
Set-4, 3, 3
** ----------------------------------------------------------------
**
** STEP: Step-1
**
*Step, name=Step-1, nlgeom=YES, inc=100000
*Static
0.001, 1., 1e-14, 0.001
**
** BOUNDARY CONDITIONS
**
** Name: BC-5 Type: Displacement/Rotation
*Boundary
Set-5, 1, 1, -0.15
**
** OUTPUT REQUESTS
**
*Restart, write, frequency=0
**
** FIELD OUTPUT: F-Output-1
**
*Output, field, variable=PRESELECT
**
** HISTORY OUTPUT: H-Output-1
**
*Output, history, variable=PRESELECT
*End Step
